# Исходные данные
# Напряжение питания ИВЭП:
E_п := 115  # В
# Диапазон колебаний напряжения питания:
E_пmax := E_п + E_п*0.4 = 161  # В
E_пmin := E_п - E_п*0.6 = 46  # В
# Частота:
f := 400  # Гц
# Частота преобразования:
f_пр := 30*10^3  # Гц
# Напряжение нагрузки ИВЭП:
U_н := 27  # В
# Величина допустимого отклонения значения выходного напряжения:
ΔU_н := U_н*0.02 = 0.54  # В
# Ток нагрузки ИВЭП:
I_н := 0.5  # А
# Температура окружающей среды:
T_окс1 := 233  # К
T_окс2 := 343  # К
# Нестабильность выходного напряжения при изменении Eп:
δU_E := 0.02  # В
# Нестабильность выходного напряжения при изменении Iн:
δU_I := 0.03  # В
# Параметры микросхемы
# Номинальный ток питания микросхемы:
I_мн := 11*10^-3  # А
# Максимальный входной ток микросхемы:
I_мmax := 17*10^-3  # А
# Максимальный выходной ток микросхемы:
I_выхmax := 1  # А
# Номинальное напряжение питания микросхемы:
U_мн := 9  # В
# Максимальное напряжение питания микросхемы:
U_мmax := 30  # В
# Максимальное выходное напряжение микросхемы:
U_выхmax := 5  # В
# Максимально допустимая температура микросхемы:
T_мmax := 343  # К
# Минимально допустимая температура микросхемы:
T_мmin := 233  # К
# Амплитуда пилообразного напряжения генератора:
U_ампл := 1.7  # В
# Гистерезис питания микросхемы:
ΔU_г := 0.8  # В
# Пусковой ток микросхемы:
I_пуск := 0.5*10^-3  # А
# Напряжение включения микросхемы:
U_вкл := 16  # В
# Максимальный выходной ток микросхемы с датчика тока:
I_выхmaxд := 2*10^-6  # А
# Опорное напряжение УСР микросхемы:
U_он := 2.5  # В
# Электрический расчёт
# Определяем суммарную мощность нагрузки:
P_н := I_н*U_н + I_мн*U_мн = 13.599  # Вт
# Задаёмся ориентировочным значением КПД:
η := 0.85
# Определяем максимальное значение преобразуемой мощности с учётом дополнительных потерь в ИВЭП:
P_пр := P_н/η = 15.9988  # Вт
# Расчитываем трансформатор.
# Выбираем сердечник МП-140.
# Магнитная индукция насыщения:
B_s := 0.7  # Т
# Остаточная индукция:
B_r := 0.03  # Т
# Магнитная постоянная:
μ_0 := 4*π*10^-7 = 1.25664e-6  # Гн/м
# Максимальная рабочая индукция:
B_m := 0.8*B_s = 0.56  # Т
# Относительная магнитная проницаемость:
μ := 140  # Гн/м
# Максимальная напряжённость:
H_m := B_m/(μ*μ_0) = 3183.1  # А/м
# Объём сердечника:
V_серд := 2*P_пр/(B_m*H_m*f_пр) = 5.98355e-7  # м^3
# Типоразмер сердечника - тороидальный МП15х7х4.8
D := 15*10^-3  # м
d := 7*10^-3  # м
h := 4.8*10^-3  # м
# Объём сердечника-стали:
V_стали := (π*D^2 - π*d^2)/4*h = 6.63504e-7  # м^3
# Площадь поперечного сечения:
S_стали := h*(D - d)/2 = 1.92e-5  # м^2
# Площадь окна:
S_окна := π*d^2/4 = 3.84845e-5  # м^2
# Средняя длина - длина силовой линии:
l_ср := (D + d)/2*π = 0.0345575  # м
# Длина одного витка:
l_о := 2*h + (D - d) = 0.0176  # м
# Площадь охлаждения:
S_охл := π*D*h + π*D^2/2 = 0.000579624  # м^2
# Определяем максимальную индукцию, которая возникает в выбранном сердечнике с объёмом Vсерд:
B_m := sqrt(2*P_пр*μ*μ_0/(V_стали*f_пр)) = 0.531796  # Т
H_m := B_m/(μ*μ_0) = 3022.79  # А/м
# Определяем мощность,которую может рассеять трансформатор с таким сердечником.
# Коэффициент охлаждения αохл зависит от формы тела, от того, как она соориентирована в гравитационном поле, от давления, влажности и т.д.
α_охл := 20  # Вт/К*м^2
# Максимальная температура обмоток:
T_обмmax := 403  # К
# Допустимый перегрев:
ΔT := T_обмmax - T_мmax = 60  # К
# Тепловое сопротивление:
R_т := 1/(α_охл*S_охл) = 86.2628  # Ом
P_рас := ΔT/R_т = 0.695549  # Вт
# Определяем потери мощности на перемагничивание сердечника.
# Параметры апроксимации:
α := 1.48
β := 1.85
# Удельные магнитные потери:
P_0 := 2000  # Вт/м^3
P_пс := P_0*(f_пр/1000)^α*((B_m - B_r)/2)^β*V_стали = 0.0157792  # Вт
# Определяем допустимую мощность в обмотках трансформатора:
P_по := P_рас - P_пс = 0.679769  # Вт
# Pпо > 0, значит частота преобразования, максимальная индукция и размер сердечника выбраны правильно.
# Определяем число витков первичной обмотки трансформатора.
# Максимальный коэффициент заполнения управляющих импульсов:
кз_max := 0.5
I_нагmax := 2*P_пр/(E_пmin*кз_max) = 1.3912  # А
W_1 := E_пmin*кз_max/(f_пр*S_стали*B_m) = 75.0862
W_1 := 76
# Определяем число витков вторичных обмоток трансформатора.
# Число витков вторичной обмотки канала питания нагрузки:
W_2 := (U_н + 0.7)*(1 - кз_max)/(f_пр*S_стали*B_m) = 45.2149
W_2 := 46
# Число витков вторичной обмотки канала питания микросхемы:
W_4 := (U_мн + 0.7)*(1 - кз_max)/(f_пр*S_стали*B_m) = 15.8334
W_4 := 16
# Индуктивность обмоток трансформатора:
L_1 := μ_0*μ*S_стали*W_1^2/l_ср = 0.000564578  # Гн
L_2 := μ_0*μ*S_стали*W_2^2/l_ср = 0.000206829  # Гн
L_3 := μ_0*μ*S_стали*W_4^2/l_ср = 2.50228e-5  # Гн
# Мощность потерь в обмотках трансформатора:
P_1 := P_по*P_пр/(P_пр + P_н) = 0.367443  # Вт
P_2 := P_по*I_н/2*U_н/(P_пр + P_н) = 0.155026  # Вт
P_3 := P_по*I_мн*U_н/(P_пр + P_н) = 0.00682116  # Вт
P_сум := P_1 + 2*P_2 + P_3 = 0.684317  # Вт
P_по = 0.679769  # Вт
# Pсум = Pпо, следовательно расчёты верны.
# Максимально допустимые сопротивления обмоток:
R_об1 := 3*P_1/(P_пр/(E_п*кз_max))^2 = 14.2387  # Ом
R_об2 := 3*P_2/(P_пр/(E_п*кз_max))^2 = 6.0074  # Ом
R_об4 := 3*P_3/(P_пр/(E_п*кз_max))^2 = 0.264326  # Ом
# Удельное сопротивление меди:
ρ := 0.0175*10^-6  # Ом*м
# Определяем площади поперечных сечений и диаметры проводов всех обмоток трансформатора.
S_1 := ρ*W_1*l_о/R_об1 = 1.64397e-9  # м^2
d_1 := sqrt(4*S_1/W_1) = 9.30186e-6  # м
S_2 := ρ*W_2*l_о/R_об2 = 2.35842e-9  # м^2
d_2 := sqrt(4*S_2/W_2) = 1.43206e-5  # м
S_4 := ρ*W_4*l_о/R_об4 = 1.86437e-8  # м^2
d_4 := sqrt(4*S_4/W_4) = 6.82709e-5  # м
# Выбираем провод ПЭТ-155.Диаметры проводов марки ПЭТ-155
d_1 := 0.1*10^-3  # м
d_1i := 0.125*10^-3  # м
d_2 := 0.1*10^-3  # м
d_2i := 0.125*10^-3  # м
d_4 := 0.1*10^-3  # м
d_4i := 0.125*10^-3  # м
# Сечение проводов с изоляцией:
S_1 := π*d_1i^2/4 = 1.22718e-8  # м^2
S_2 := π*d_2i^2/4 = 1.22718e-8  # м^2
S_4 := π*d_4i^2/4 = 1.22718e-8  # м^2
# Размещение проводов с изоляцией
K_зокна := 0.5
S_обмΣ := (S_1*W_1 + S_2*W_2*2 + S_4*W_4)/K_зокна = 4.51604e-6
S_окна = 3.84845e-5
S_окна - S_обмΣ = 3.39685e-5
# Максимальный ток и напряжение МДП транзистора
U_тр := E_пmax + U_н*W_1/W_2 = 205.609  # В
I_тр := 1.2*I_нагmax = 1.66944  # А
# Выбираем КП751Б. Аналог - IRF720.
# Напряжение сток-исток:
U_сиmax := 350  # В
# Ток сток-исток:
I_сmax := 3.3  # А
# Напряжение затвор-исток:
U_зиmax := 20  # В
# Сопротивление сток-исток в открытом состоянии:
R_сиост := 1.8  # Ом
# Пороговое напряжение:
U_порmax := 4  # В
# Крутизна ВАХ:
S_min := 1.7  # А/В
# Входная ёмкость:
C_iss := 600*10^-12  # Ф
# Выходная ёмкость:
C_oss := 180*10^-12  # Ф
# Проходная ёмкость:
C_rss := 70*10^-12  # Ф
# Ёмкость затвор-сток:
C_зс := C_rss = 7e-11  # Ф
# Ёмкость сток-исток:
C_си := C_oss - C_зс = 1.1e-10  # Ф
# Ёмкость затвор-исток:
C_зи := C_iss - C_зс = 5.3e-10  # Ф
# Предельно допустимая температура:
T_maxvt1 := 573  # К
# Чтобы транзистор пропускал ток Iнагmax, необходимо чтобы выполнялось следующее условие: Uзирас < Uзи, т.е. Uзирас < 20 В.
U_зирас := U_порmax + I_нагmax/S_min = 4.81835  # В
# Расчёт сопротивления на затворе:
R_8 := U_выхmax/I_выхmax = 5  # Ом
R_8 := 5.1  # Ом
P_R8 := I_выхmax^2*R_8 = 5.1  # Вт
# Расчёт диодов выходного фильтра:
U_vd8 := (U_н + E_пmax*W_2/W_1)*1.5 = 186.671  # В
I_vd8 := 1.5*I_н = 0.75  # А
# Выбираем диод КД217А:
U_обр8 := 100  # В
I_пр8 := 3  # А
U_прvd8 := 1.4  # В
T_maxvd8 := 398  # К
# Расчёт диода канала подпитки микросхемы:
U_vd5 := (U_мн + E_пmax*W_4/W_1)*1.5 = 64.3421  # В
I_vd5 := 2*I_мн = 0.022  # А
# Выбираем диод КД103А:
U_обр5 := 50  # В
I_пр5 := 0.1  # А
U_прvd5 := 1  # В
T_maxvd5 := 373  # К
# Расчёт ёмкости выходного фильтра:
C_7 := 1.4*I_нагmax*кз_max/(f_пр*ΔU_н) = 6.01137e-5  # Ф
# Согласно ряду Е24:
C_7 := 6.2*10^-5  # Ф
# Найдём сопротивление резистора R11, определяющего уровень срабатывания токовой защиты:
# Опорное напряжение компаратора токовой защиты:
U_R11 := 1  # В
R_11 := U_R11/I_нагmax = 0.718803  # Ом
R_11 := 7.5*10^-1  # Ом
# Рассеиваемая мощность:
P_R4 := I_нагmax^2*R_11 = 1.45158  # Вт
# Время выхода ИВЭП на режим после включения микросхемы:
t_внр := C_7*U_н/I_н*ln(I_тр/(I_тр - I_нагmax)) = 0.00599881  # с
# Ёмкость конденсатора C1 пускового узла питания:
C_1 := I_мн*t_внр/(ΔU_г*3) = 2.74945e-5  # Ф
C_1 := 3*10^-5  # Ф
# Сопротивление резистора R2 пускового узла питания:
R_2 := 0.8*E_пmin/I_пуск = 73600  # Ом
R_2 := 7.5*10^4  # Ом
# Рассеиваемая мощность:
P_R2 := (2*I_пуск)^2*R_2 = 0.075  # Вт
# Общее время готовности к работе:
t_овг := t_внр + R_2*C_1*U_вкл/E_пmin = 0.788608  # c
# Определяем сопротивление резисторов датчика выходного напряжения.
# Ток делителя через резисторы R3 и R4:
I_дел := 500*I_выхmaxд = 0.001
R_4 := U_он/I_дел = 2500  # Ом
R_3 := (U_мн - U_он)/I_дел = 6500  # Ом
R_4 := 2.4*10^3  # Ом
R_3 := 6.8*10^3  # Ом
P_R4 := I_дел^2*R_4 = 0.0024  # Вт
P_R3 := I_дел^2*R_3 = 0.0068  # Вт
# Определяем ёмкость C4 узла обратной связи. Чтобы не было ложного срабатывания, пульсации напряжения должны быть как можно меньше. Потому и постоянная времени цепи C4-R3-R4 должна быть минимум на порядок больше периода преобразования.
t_пр := 50*1/f_пр = 0.00166667  # с
C_4 := t_пр/(R_3 + R_4) = 1.81159e-7  # Ф
C_4 := 20*10^-9  # Ф
# Найдём коэффициент передачи УСР, исходя из требуемой точности стабилизации выходного напряжения:
K_УСР := (U_н - δU_E)*(R_3*R_4)/(δU_E*R_4*W_4*кз_max*E_п/(W_1*(1 - кз_max)*U_ампл)) = 644118
# Определяем R9 и С5 для датчика тока R4:
100*R_4 = 240000
R_9 > 100*R_4
U_R4 > 100*I_выхmaxд*R_3
R_9 := U_R11/(100*I_выхmaxд) = 5000  # Ом
R_9 := 5.1*10^3  # Ом
P_R9 := I_выхmaxд^2*R_9 = 2.04e-8  # Вт
# Время включения транзистора:
t_вктр := (U_выхmax*C_зи + C_зс*(U_тр - U_выхmax))/(U_выхmax/R_9) = 1.70265e-5  # с
C_5 := t_вктр/(3*R_3) = 8.3463e-10  # Ф
C_5 := 9.1*10^-10  # Ф
# Расчёт защитной RCD-цепи.
ΔU_сил := 10  # В
C_8 := 0.03*B_m^2*V_стали/(μ*μ_0*((U_тр + ΔU_сил)^2 - U_тр^2)) = 7.59647e-9  # Ф
C_8 := 8.2*10^-9  # Ф
R_7 := ((E_пmin + (U_н + U_прvd8)*W_1/W_2) + (U_мн + U_прvd5)*W_1/W_4)/(C_8*ΔU_сил*f_пр) = 57082  # Ом
R_7 := 62*10^3  # Ом
# Потери в резисторе R8:
E_pnom := E_п - U_R11 - I_нагmax*R_сиост = 111.496  # В
P_R8 := C_8*E_pnom*ΔU_сил*f_пр = 0.27428  # Вт
# Диод в RCD-цепи:
U_VD7обр > 1.5*U_тр
1.5*U_тр = 308.413  # В
I_VD7пр > 1.5*I_тр
1.5*I_тр = 2.50416  # А
# Выбираем диод КД202М:
I_VD7пр := 9  # А
U_VD7обр := 350  # В
U_VD7пр := 0.9  # В
P_ΘVD7 := 276.65  # К/Вт
T_maxvd7 := 403  # К
# В результате моделирования были получены следующие значения элементов:
# Резисторы [Ом]:
R_1 := 1
# С2-33Н-2Вт
P_R1доп := 2
# Вт
#
# Вт
#
# Вт
#
# Вт
#
# Вт
#
# Вт
#
# Вт
#
# Вт
#
# Вт
#
# Вт
#
# Вт
#
# Вт
#
# Вт
R_2 := 7.5*10^4  # С2-33Н-0.25Вт
P_R2доп := 0.25
R_3 := 6.8*10^3
# С2-33Н-0.125Вт
P_R3доп := 0.125
R_4 := 2.4*10^3
# С2-33Н-0.125Вт
P_R4доп := 0.125
R_5 := 270
# С2-33Н-0.125Вт
P_R5доп := 0.125
R_6 := 100*10^3
# С2-33Н-0.125Вт
P_R6доп := 0.125
R_7 := 62*10^3
# С2-33Н-0.125Вт
P_R7доп := 0.125
R_8 := 5.1
# С2-33Н-0.125Вт
P_R8доп := 0.125
R_9 := 5.1*10^3
# С2-33Н-0.125Вт
P_R9доп := 0.125
R_10 := 2*10^3
# С2-33Н-0.125Вт
P_R10доп := 0.125
R_11 := 7.5*10^-1  # С2-33Н-1Вт
P_R11доп := 1
R_12 := 4.3  # KNP-20Вт
P_R12доп := 20
R_13 := 4.3  # KNP-20Вт
P_R13доп := 20
# Конденсаторы [Ф]:
C_1 := 3*10^-5
# К50-35
#
# К73-17 имп.
#
# К10-17Б
#
# К10-17Б
#
# К10-17Б
#
# К10-17Б
#
# К10-17Б
#
# К10-17-3Б
#
# К50-35
#
# К50-35
U_C1ном := 450
# В
#
# В
#
# В
#
# В
#
# В
#
# В
#
# В
#
# В
#
# В
#
# В
C_2 := 3*10^-6
U_C2ном := 400
C_3 := 1*10^-9
U_C3ном := 50
C_4 := 20*10^-9
U_C4ном := 50
C_5 := 9.1*10^-10
U_C5ном := 50
C_6 := 100*10^-9
U_C6ном := 50
C_7 := 6.2*10^-5
U_C7ном := 50
C_8 := 8.2*10^-9
U_C8ном := 160
C_9 := 0.62*10^-3
U_C9ном := 25
C_10 := 0.62*10^-3
U_C10ном := 25
# Энергетический расчёт
#
# Энергетический расчёт проводим следующим образом: используя OrCAD PSpice, смотрим мощность потерь всех элементов, на которых эти потери возможны.
# В результате имеем следующие значения мощности потерь [Вт]:
# В силовом транзисторе:
P_M1 := 1.6
# В ШИМ-контроллере:
P_U1 := 169*10^-3
# В диодах:
P_D1 := 300*10^-3
P_D2 := 160*10^-3
P_D3 := 160*10^-3
P_D4 := 300*10^-3
P_D5 := 18*10^-3
P_D6 := 10^-3
P_D7 := 1.25*10^-3
P_D8 := 3
P_D9 := 3
# Суммарные потери на диодах:
P_D := P_D1 + P_D2 + P_D3 + P_D4 + P_D5 + P_D6 + P_D7 + P_D8 + P_D9 = 6.94025
# В резисторах:
P_R2 := 155*10^-3
P_R3 := 26*10^-3
P_R4 := 7.4*10^-3
P_R5 := 7.45*10^-6
P_R6 := 385*10^-6
P_R7 := 61*10^-3
P_R8 := 2.15*10^-3
P_R9 := 145*10^-6
P_R10 := 20.7*10^-3
P_R11 := 940*10^-3
# Суммарные потери на резисторах:
P_R := P_R2 + P_R3 + P_R4 + P_R5 + P_R6 + P_R7 + P_R8 + P_R9 + P_R10 + P_R11
P_R = 1.21279
# Суммарные потери ИВЭП:
P_ИВЭП := P_M1 + P_U1 + P_D + P_R = 9.92204
# КПД устройства:
η_уст := P_н/(P_н + P_ИВЭП) = 0.578163
# Расчёт показателей надёжности
# Резисторы
K_IR := 1
K_UR := 1
K_E := 1
λ_0R := 0.087*10^-6  # 1/ч
T_0 := 298  # К
T_раб := 343  # К
# Коэффициенты интенсивности отказов:
K_PR2 := P_R2/P_R2доп = 0.62
K_PR7 := P_R7/P_R7доп = 0.488
K_PR8 := P_R8/P_R8доп = 0.0172
K_PR3 := P_R3/P_R3доп = 0.208
K_PR9 := P_R9/P_R9доп = 0.00116
K_PR4 := P_R4/P_R4доп = 0.0592
K_PR10 := P_R10/P_R10доп = 0.1656
K_PR5 := P_R5/P_R5доп = 5.96e-5
K_PR6 := P_R6/P_R6доп = 0.00308
K_PR11 := P_R11/P_R11доп = 0.94
K_PR := K_PR2 + K_PR3 + K_PR4 + K_PR5 + K_PR6 + K_PR7 + K_PR8 + K_PR9 + K_PR10 + K_PR11
K_PR = 2.5023
K_Т := T_раб/T_0 = 1.15101
# Интенсивоности отказов элементов (1/ч):
λ_R := λ_0R*K_IR*K_UR*K_E*K_PR*K_Т = 2.50574e-7
# Конденсаторы
K_IC := 1
K_PC := 1
K_E := 1
T_0 := 298  # К
U_C1 := 103
# В
#
# В
#
# В
#
# В
#
# В
U_C6 := 5
# В
#
# В
#
# В
#
# В
#
# В
U_C2 := 16
U_C7 := 920*10^-3
U_C3 := 13
U_C8 := 100
U_C4 := 17
U_C9 := 9
U_C5 := 2
U_C10 := 9
# Коэффициенты интенсивности отказов:
K_UC1 := U_C1/U_C1ном = 0.228889
K_UC6 := U_C6/U_C6ном = 0.1
K_UC2 := U_C2/U_C2ном = 0.04
K_UC7 := U_C7/U_C7ном = 0.0184
K_UC3 := U_C3/U_C3ном = 0.26
K_UC8 := U_C8/U_C8ном = 0.625
K_UC4 := U_C4/U_C4ном = 0.34
K_UC9 := U_C9/U_C9ном = 0.36
K_UC5 := U_C5/U_C5ном = 0.04
K_UC10 := U_C10/U_C10ном = 0.36
# Электролитические конденсаторы:
λ_0Cэл := 0.35*10^-6  # 1/ч
K_UCэл := K_UC1 + K_UC9 + K_UC10 = 0.948889
# Интенсивоности отказов элементов (1/ч):
λ_Cэл := λ_0Cэл*K_IC*K_UCэл*K_E*K_PC*K_Т = 3.82262e-7
# Керамические конденсаторы:
λ_0Cкер := 0.15*10^-6  # 1/ч
K_UCкер := K_UC3 + K_UC4 + K_UC5 + K_UC6 + K_UC7 + K_UC8 = 1.3834
# Интенсивоности отказов элементов (1/ч):
λ_Cкер := λ_0Cкер*K_IC*K_UCкер*K_E*K_PC*K_Т = 2.38845e-7
# Плёночные конденсаторы:
λ_0Cпл := 0.05*10^-6  # 1/ч
K_UCпл := K_UC2 = 0.04
# Интенсивоности отказов элементов (1/ч):
λ_Cпл := λ_0Cпл*K_IC*K_UCпл*K_E*K_PC*K_Т = 2.30201e-9
λ_C := λ_Cэл + λ_Cкер + λ_Cпл = 6.2341e-7
# Тепловой расчёт
# Максимальная рабочая температура теплонагруженных элементов [К]; должна быть на 20% меньше предельно допустимой температуры элементов:
T_ivd8 := T_maxvd8 - T_maxvd8/5 = 318.4
T_ivd5 := T_maxvd5 - T_maxvd5/5 = 298.4
T_ivd7 := T_maxvd7 - T_maxvd7/5 = 322.4
T_ivt1 := T_maxvt1 - T_maxvt1/5 = 458.4
T_iм := T_мmax - T_мmax/5 = 274.4
