# Исходны данные:
U_п := 115
U_пmax := U_п*1.4 = 161
f := 400
U_пmin := U_п*0.6 = 69
U_н := 27
ΔU := 0.01*U_н = 0.27
I_н := 0.5
f_пр := 30*10^3
# Параметры микросхемы:
U_пвых := 5
I_пм := 11*10^-3
I_пmax := 17*10^-3
U_дпр := 0.6
I_выхmax := 1
U_pil := 1.7
U_пм := 9
T_мmax := 343
U_пмmax := 30
T_мmin := 233
# Сердечник:
# K20x15x10
μ_н := 140
D := 20*10^-3
d := 10*10^-3
h := 5*10^-3
S_стали := (D - d)*h/2 = 2.5e-5
S_окна := π*d^2/2 = 0.00015708
V_стали := (π*D^2/4 - π*d^2/4)*h = 1.1781e-6
l_ср := π*((D + d)/2) = 0.0471239
l_витка := 2*h + D - d = 0.02
S_охлаждения := π*D*h + 2*π*D^2/4 = 0.000942478
1.
B_s25 := 0.7
T_сер := 70
B_smin := B_s25 - 0.15/100*(T_сер - 25) = 0.6325
2.
B_m := 0.8*B_smin = 0.506
3.
P_н := 2*I_н*U_н + I_пм*U_пм = 27.099
4.
η := 0.9
μ_0 := 4*π*10^-7
H_m := B_m/(μ_0*μ_н) = 2876.16
P_пр := P_н/η
V_серд := 2*P_пр/(B_m*H_m*f_пр) = 1.37929e-6
5.
B_r := 0.08
# Потери в сердечнике на перемагничивание
B_m1 := (B_m - B_r)/2 = 0.213
B_m2 := sqrt(2*(μ_0*μ_н)*P_н/(V_стали*f_пр)) = 0.519409
α := 1.7
β := 1.8
P_0 := 2000
f_0 := 1000
B_m0 := 1
P_серд := P_0*(f_пр/f_0)^α*(B_m1/B_m0)^β*V_стали = 0.0472499
# Рассеиваемая мощность
T_обмmax := 403
ΔT := T_обмmax - T_мmax = 60
α_охл := 20
R_T := 1/(α_охл*S_охлаждения) = 53.0516
P_рас := ΔT/R_T = 1.13097
P_обм := P_рас - P_серд = 1.08372
кз_max := 0.5
I_нmax := 2*P_пр/(U_пmin*кз_max) = 1.74551  # А
W_1 := U_пmin*кз_max/(f_пр*S_стали*B_m1) = 215.962
W_2 := (U_н + 0.6)*(1 - кз_max)/(f_пр*S_стали*B_m1) = 86.385
W_22 := (U_н + 0.6)*(1 - кз_max)/(f_пр*S_стали*B_m1) = 86.385
W_3 := (U_пм + 2*0.6)*(1 - кз_max)/(f_пр*S_стали*B_m1) = 31.9249
W_1 := 221
W_2 := 35
W_22 := 35
W_3 := 13
# Индуктивности обмоток трансформатора:
L_1 := μ_0*μ_н*S_стали*W_1^2/l_витка = 0.0107407
L_2 := μ_0*μ_н*S_стали*W_2^2/l_витка = 0.000269392
L_3 := μ_0*μ_н*S_стали*W_3^2/l_витка = 3.7165e-5
L_22 := μ_0*μ_н*S_стали*W_22^2/l_витка = 0.000269392
# Мощность потерь в обмотках трансформатора:
P_1 := P_обм*P_пр/(P_пр + P_н) = 0.570381  # Вт
P_2 := P_обм*I_н*U_н/(P_пр + P_н) = 0.255734  # Вт
P_22 := P_обм*I_н*U_н/(P_пр + P_н) = 0.255734  # Вт
P_3 := P_обм*I_пм*U_пм/(P_пр + P_н) = 0.00187538  # Вт
P_сум := P_1 + P_2 + P_3 + P_22 = 1.08372  # Вт
# Сопротивления обмоток:
R_1 := 3*P_1/(P_пр/(U_п*кз_max))^2 = 6.24023  # Ом
R_2 := 3*P_2/(I_нmax/(1 - кз_max))^2 = 0.0629515  # Ом
R_22 := 3*P_2/(I_нmax/(1 - кз_max))^2 = 0.0629515  # Ом
R_3 := 3*P_3/(I_пм/(1 - кз_max))^2 = 11.6243  # Ом
# Площади поперечных сечений и диаметры проводов обмоток трансформатора:
ρ := 0.0175*10^-6
S_1 := ρ*W_1*l_витка/R_1 = 1.23954e-8  # м^2
d_1 := sqrt(4*S_1/π) = 0.000125628
S_2 := ρ*W_2*l_витка/R_2 = 1.94594e-7  # м^2
d_2 := sqrt(4*S_2/π) = 0.00049776
S_22 := ρ*W_22*l_витка/R_22 = 1.94594e-7  # м^2
d_22 := sqrt(4*S_22/π) = 0.00049776
S_3 := ρ*W_3*l_витка/R_3 = 3.91423e-10  # м^2
d_3 := sqrt(4*S_3/π) = 2.23243e-5
# Провод ПЭТ-155
d_1 := 0.2*10^-3
d_i1 := 0.105*10^-3
d_2 := 0.6*10^-3
d_i2 := 0.105*10^-3
d_22 := 0.6*10^-3
d_i22 := 0.105*10^-3
d_3 := 0.6*10^-3
d_i3 := 0.105*10^-3
S_2 := π*d_i2^2/4 = 8.65901e-9  # м^2
S_1 := π*d_i1^2/4 = 8.65901e-9  # м^2
S_22 := π*d_i22^2/4 = 8.65901e-9  # м^2
S_3 := π*d_i3^2/4 = 8.65901e-9
м^2
кз_окна := 0.5
S_обм := (S_1*W_1 + S_2*W_2 + S_22*W_22 + S_3*W_3)/кз_окна = 5.26468e-6  # м^2
S_окна - S_обм = 0.000151815
# Так как площадь окна больше, то рамзещение обмоток возможно
U_трсил := U_пmax + U_н*W_1/W_2 = 331.486
I_тр := 1.2*I_нmax = 2.09461
# Выбор силового транзистора:
# IRF840 (отечественный аналог КП770)
U_сиmax := 500  # В
I_ст := 8  # А
# Определим величину сопротивления на затворе R9:
R9 := U_пвых/I_выхmax = 5  # Ом
R9 := 5.1  # Ом  # выбираем резистор по ряду Е24 марки с2-33.
# Расчет диодов выходного фильтра
U_vd1 := (U_н + U_пmax*W_2/W_1) = 52.4977
I_vd1 := 1.5*I_н = 0.75
# Диод выберем КД223А
U_д1 := 200  # В
I_д1 := 2  # А
U_vd2 := (U_пм + U_пmax*W_3/W_1) = 18.4706
I_vd2 := 1.5*I_пм = 0.0165
# Диод выберем КД116Б1
U_д2 := 50  # В
I_д2 := 0.1  # А
# Расчет емкости выходного фильтра
C_1 := I_н*кз_max/(2*f_пр*ΔU) = 1.54321e-5
C_1 := 12.3*10^-6
